** ----------------------------------------------------------------
**
** MATERIALS
**
*Material, name=Bone
*Density
1.89e-09,
*Elastic
18000.000000, 0.300000
*Concrete Damaged Plasticity
40.000000, 0.100000, 1.160000, 0.666700, 0.000000
*Concrete Compression Hardening
150.000000, 0.000000
151.020408, 0.000794
152.040816, 0.001587
153.061224, 0.002381
154.081633, 0.003175
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10.000000, 0.099444
*Concrete Tension Stiffening
100.000000, 0.000000
98.989362, 0.000210
97.978723, 0.000420
96.968085, 0.000629
95.957447, 0.000839
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5.000000, 0.019722
*Concrete Compression Damage
0.000000, 0.000000
0.000000, 0.000794
0.000000, 0.001587
0.000000, 0.002381
0.000000, 0.003175
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0.950000, 0.099444
*Concrete Tension Damage
0.000000, 0.000000
0.010106, 0.000210
0.020213, 0.000420
0.030319, 0.000629
0.040426, 0.000839
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0.950000, 0.019722
*Concrete Failure, TYPE=Strain
0.099444, 0.019722, 0.950000, 0.950000
**
** ----------------------------------------------------------------
** ----------------------------------------------------------------
**
** MATERIALS
**
*Material, name=Screw
*Density
4.50e-09,
*Elastic
120000.000000, 0.300000
**
** ----------------------------------------------------------------
