*Heading
** Job name: Job-1 Model name: contiOpti
** Generated by: Abaqus/CAE 2020
*Preprint, echo=NO, model=NO, history=NO, contact=NO
**
** ----------------------------------------------------------------
** ----------------------------------------------------------------
**
** PARTS
**
**
*Part, name=Screw
*End Part
**
**
*Part, name=Bone
*End Part
**
**
** ----------------------------------------------------------------
**
** ASSEMBLY
**
*Assembly, name=Assembly
**
*Instance, name=Bone-1, part=Bone
*Node
11,-5.13979043,-2.27107019,-4.18355035
12,-5.13979043,-2.03201017,-4.18355035
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*Element, type=C3D8, elset=Set-1
1, 11, 51, 52, 12, 1771, 1811, 1812, 1772,
2, 12, 52, 53, 13, 1772, 1812, 1813, 1773,
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** Section: Bone
*Solid Section, elset=Set-1, controls=EC-1, material=Bone
,
*End Instance
*Instance, name=Screw-1, part=Screw
*Node
1,-0.90000000,1.00000000,-3.00000000
2,-1.88078833,-0.79560912,6.31451607
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*Element, type=C3D10, elset=Set-2
1, 953, 954, 955, 910, 1442, 1441, 1440, 1444, 1443, 1445,
2, 953, 956, 710, 957, 1448, 1447, 1446, 1450, 1449, 1451,
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** Section: Screw
*Solid Section, elset=Set-2, controls=EC-2, material=Screw
,
*End Instance
** ----------------------------------------------------------------
**
*Nset, nset=BoneSide, instance=Bone-1
11, 12, 13, 14, 15, 16
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*Nset, nset=ScrewTop, instance=Screw-1
46,    47,    48,    50,    51,   809
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*Elset, elset=ScrewTop, instance=Screw-1
108,   181,   221,   253,   298,   550
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*Nset, nset=ScrewTopRef, instance=Screw-1
46, 47, 48, 50, 51, 412
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**
** ----------------------------------------------------------------
*End Assembly
**
** ----------------------------------------------------------------
** ----------------------------------------------------------------
**
** ELEMENT CONTROLS
**
*Section Controls, name=EC-1, DISTORTION CONTROL=YES, ELEMENT DELETION=YES, MAX DEGRADATION=0.8, second order accuracy=YES
1., 1., 1.
**
** ----------------------------------------------------------------
** ----------------------------------------------------------------
**
** ELEMENT CONTROLS
**
*Section Controls, name=EC-2, DISTORTION CONTROL=YES, ELEMENT DELETION=NO, MAX DEGRADATION=0.8, second order accuracy=YES
1., 1., 1.
**
** ----------------------------------------------------------------
** ----------------------------------------------------------------
**
*Amplitude, name=Amp-1
0.,              0.,              1.,              1.
**
** ----------------------------------------------------------------
** ----------------------------------------------------------------
**
** MATERIALS
**
*Material, name=Bone
*Density
1.89e-09,
*Elastic
10000.000000, 0.300000
*Concrete Damaged Plasticity
40.000000, 0.100000, 1.160000, 0.666700, 0.000000
*Concrete Compression Hardening
100.000000, 0.000000
101.052632, 0.000421
102.105263, 0.000842
103.157895, 0.001263
104.210526, 0.001684
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6.000000, 0.049400
*Concrete Tension Stiffening
50.000000, 0.000000
48.967391, 0.000212
47.934783, 0.000424
46.902174, 0.000636
45.869565, 0.000848
44.836957, 0.001060
43.804348, 0.001272
42.771739, 0.001484
41.739130, 0.001696
40.706522, 0.001908
39.673913, 0.002120
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2.500000, 0.009750
*Concrete Compression Damage
0.000000, 0.000000
0.000000, 0.000421
0.000000, 0.000842
0.000000, 0.001263
0.000000, 0.001684
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0.950000, 0.049400
*Concrete Tension Damage
0.000000, 0.000000
0.020652, 0.000212
0.041304, 0.000424
0.061957, 0.000636
0.082609, 0.000848
0.103261, 0.001060
0.123913, 0.001272
0.144565, 0.001484
0.165217, 0.001696
0.185870, 0.001908
0.206522, 0.002120
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0.950000, 0.009750
*Concrete Failure, TYPE=Strain
0.049400, 0.009750, 0.950000, 0.950000
**
** ----------------------------------------------------------------
** ----------------------------------------------------------------
**
** MATERIALS
**
*Material, name=Screw
*Density
4.50e-09,
*Elastic
120000.000000, 0.300000
**
** ----------------------------------------------------------------
** ----------------------------------------------------------------
**
** INTERACTION PROPERTIES
**
*Surface Interaction, name=IntProp-1
*Friction
0.300000,
*Surface Behavior, pressure-overclosure=HARD
**
** INTERACTIONS
**
** Interaction: Int-1
*Contact, op=NEW
*Contact Inclusions, ALL EXTERIOR
*Contact Property Assignment
 ,  , IntProp-1
**
** ----------------------------------------------------------------
** ----------------------------------------------------------------
**
** STEP: Step-1
**
*Step, name=Step-1, nlgeom=YES
*Dynamic, Explicit
, 1.
*Bulk Viscosity
0.06, 1.2
** Mass Scaling: Semi-Automatic
**               Whole Model
*Fixed Mass Scaling, dt=1e-06, type=below min
**
** ----------------------------------------------------------------
** ----------------------------------------------------------------
**
** BOUNDARY CONDITIONS
**
** Name: BC-1 Type: Displacement/Rotation
*Boundary, amplitude=Amp-1
ScrewTopRef, 3, 3, 2.500000
** Name: BC-2 Type: Displacement/Rotation
*Boundary, amplitude=Amp-1
BoneSide, 1, 1
BoneSide, 2, 2
BoneSide, 3, 3
**
** ----------------------------------------------------------------
** ----------------------------------------------------------------
**
** OUTPUT REQUESTS
**
*Restart, write, number interval=1, time marks=NO
**
** FIELD OUTPUT: F-Output-1
**
*Output, field
*Node Output
A, RF, TIEADJUST, TIEDSTATUS, U, V
*Element Output, directions=YES
BURNF, DAMAGEC, DAMAGEMC, DAMAGEMT, DAMAGESHR, DAMAGET, DBURNF, DENSITY, DENSITYVAVG, EACTIVE, EMSF, ESDV, EVF, FV, LE, MFR
PE, PEEQ, PEEQVAVG, PEVAVG, RHOE, RHOP, S, SDV, STATUS, SVAVG, UVARM
*Contact Output
CSTRESS,
**
** HISTORY OUTPUT: H-Output-2
**
*Output, history
*Node Output, nset=ScrewTopRef
RF3, U3, UR3
**
** HISTORY OUTPUT: H-Output-1
**
*Output, history, variable=PRESELECT
*End Step
**
** ----------------------------------------------------------------
